<?xml version="1.0" ?>

<Node name="root" dt="0.01" gravity="0 0 -9.81">
    <RequiredPlugin name="SofaPython" pluginName="SofaPython3" />
    <RequiredPlugin pluginName="MyPlugin"/>

    <MyComponent myparam="3.7"/>
    <DeformationTracking/>
</Node>
